// SBML level 3 version 1
// HPA-axis (hypothalamic-pituitary-adrenal) stress/depression model.
//     Re-encoded as an explicit ODE system using SBML rateRules. The prior version
//     marked every species boundaryCondition="true" (pinned) and emitted the
//     derivatives as product species, so nothing evolved. The equations below are
//     the ones documented in that prior version's comments, now actually wired up.
//     State variables (levels):
//       x1_internal, x1_external : CRH (corticotropin-releasing hormone) pools
//       x1_tot = x1_internal + x1_external : total CRH
//       x2 : ACTH (adrenocorticotropic hormone)
//       x3 : Cortisol
//       A  : adrenal gland activity
//       P  : pituitary gland activity
//       h  : hippocampal glucocorticoid-feedback term
//     Receptor feedback:
//       GR(x3) = (x3/kGR)^3 + 1      glucocorticoid receptor
//       step(x3) = sa+sb if x3>=T else sa   hippocampal threshold
//     Scenario driver:
//       D_t steps from D_base to D_stress at t_onset hours, modeling the onset of a
//       chronic stressor partway through a long mission (e.g. mariners/astronauts).
//     PHENOTYPE NOTE (intentional):
//       As encoded, a chronic stressor drives the inhibitory hippocampal feedback h
//       upward, which SUPPRESSES cortisol -> a *blunted / hypocortisolism* response.
//       This matches atypical depression / PTSD / burnout (HPA hypoactivity), which
//       is the intended long-mission fatigue phenotype.
//       To instead model *melancholic* depression (hypercortisolism / elevated
//       cortisol), route the stressor through the CRH drive u_t rather than through
//       h; i.e. make u_t (not just h) increase at t_onset. That is a small, local
//       change (add a time-stepped assignmentRule for u_t like the one for D_t); the
//       rest of the cascade already propagates it to cortisol.

model Major_Depressive_Disorder_Model()

  // Parameters:
  a1 = 244.8;
  a1_ext = 23.04;
  a2 = 50.4;
  a3 = 12.384;
  a5 = 0.099;
  a6 = 0.099;
  a7 = 0.04761905;
  kGR = 4;
  T = 1.5;
  sa = 1;
  sb = 3;
  u_t = 1;
  x1_dose = 0;
  D_base = 1;
  D_stress = 3;
  t_onset = 168;
  x1_internal = 1;
  x1_external = 0;
  x2 = 1;
  x3 = 1;
  A = 1;
  P = 1;
  h = 1;

  // Assignment rules:
  x1_tot := x1_internal + x1_external;
  GR := (x3/kGR)^3 + 1;
  stepfn := piecewise(sa + sb, x3 >= T, sa);
  D_t := piecewise(D_stress, time >= t_onset, D_base);
  Cortisol := x3;
  ACTH := x2;
  CRH := x1_tot;

  // Rate rules:
  x1_internal' = a1*(u_t/(h*x3*GR) - x1_internal);
  x1_external' = a1_ext*(x1_dose - x1_external);
  x2' = a2*(x1_tot*P/GR - x2);
  x3' = a3*(x2*A - x3);
  A' = a5*A*(x2 - 1);
  P' = a6*P*(x1_tot - 1);
  h' = a7*(D_t/stepfn - h);
end
